##############################################################################################
#### Atoms' types - mass - charge
##############################################################################################
#@ 4   atom types

variable O2  equal 1 # Water Oxygen
variable H2  equal 2 # Water Hydrogen

variable O3  equal 3 # Hydronium Oxygen
variable H3  equal 4 # Hydronium Hydrogen

##############################################################################################
#### Atoms' masses
##############################################################################################

mass  ${O2}    16.000
mass  ${H2}     1.010
mass  ${O3}    16.000
mass  ${H3}     1.010

##############################################################################################
#### Atoms' charges
##############################################################################################

set type ${O2}  charge    -0.820000
set type ${H2}  charge     0.410000
set type ${O3}  charge    -0.500000
set type ${H3}  charge     0.500000

##############################################################################################
#### Covalent bonds parameters
##############################################################################################
#@  2   bond types

bond_style hybrid harmonic morse
#@ O2 - H2
bond_coeff   1      harmonic       22.965000      1.0120000
#@ O3 - H3
bond_coeff   2      morse           3.857600      2.1000000       1.0000000

##############################################################################################
#### Covalent angles parameters
##############################################################################################
#@  2   angle types

angle_style harmonic
#@ H2 - O2 - H2
angle_coeff   1      1.6456800      113.24000
#@ H3 - O3 - H3
angle_coeff   2      1.6800000      111.72690

####################################################################################
#### Covalent dihedrals parameters
####################################################################################
#@ 0 dihedral types

####################################################################################
#### Covalent improper dihedrals parameters
####################################################################################
#@ 0 improper types

#####################################################################################
# Pair potentials
####################################################################################

variable rtap  equal 8.
variable rcut  equal 9.

pair_style hybrid/overlay coul/long         ${rcut} &
                             lj/cut         ${rcut} &
                             lj/mdf ${rtap} ${rcut} &
                         voth/vrep1 1 3 4 2.85 3.05 &
                         voth/vrep2         2.3 2.5

 pair_coeff         *       *       coul/long

####################################################################################
# Water - water (SPC/Fw)
pair_coeff     ${O2}   ${O2}   lj/cut           0.00674000     3.16549200
pair_modify tail no

# Water - hydronium
pair_coeff     ${O2}   ${O3}          lj/mdf         0.0053684       3.142
pair_coeff     ${O2}   ${H3}          lj/mdf         0.00010891      1.582746
pair_coeff     ${O2}   ${O3}      voth/vrep1         0.48828209      1.1         2.12       2.4
pair_coeff     ${O2}   ${H3}      voth/vrep2         0.19824288      2.1         1.0

####################################################################################

special_bonds lj 0.  0.  0.  coul 0.  0.  0.

####################################################################################
# Parameters for reciprocal space electrostatics
####################################################################################

kspace_style pppm 1.0e-5
kspace_modify fftbench no

###################################
